# transport, freight, light commercial vehicle {GLO}| market group for transport, freight, light commercial vehicle | APOS, U

Dataset: EcoSpold 1, unit process
Functional unit: 1 tkm
Category: Road / Market
Geography: GLO
Production volume: 555556339712 tkm
Generated by: SimaPro
accessRestrictedTo: 0
copyright: false

## Geography
The inventory is modelled for Global

## Reference product
- transport, freight, light commercial vehicle {GLO}| market group for transport, freight, light commercial vehicle | APOS, U [GLO]: 1 tkm
  Production Volume Amount: 555556339712

## Inputs from technosphere
- transport, freight, light commercial vehicle {RER}| market group for transport, freight, light commercial vehicle | APOS, U [GLO]: 0.104171 tkm
  Production Volume Amount: 57872609280
- transport, freight, light commercial vehicle {RoW}| market for transport, freight, light commercial vehicle | APOS, U [GLO]: 0.846502 tkm
  Production Volume Amount: 470279782400
- transport, freight, light commercial vehicle {ZA}| market for transport, freight, light commercial vehicle | APOS, U [GLO]: 0.049327 tkm
  Production Volume Amount: 27403900928

## Extrapolations
This dataset has been extrapolated from year 2011 to the year of the calculation (2021). The uncertainty has been adjusted accordingly.

## Sources
- Unknown, 2022, Ecoinvent 3, Unspecified
