# transport, freight, light commercial vehicle {ZA}| transport, freight, light commercial vehicle, all, to generic market for transport, freight, light commercial vehicle | APOS, U

Dataset: EcoSpold 1, unit process
Functional unit: 1 tkm
Category: Road / Market
Geography: GLO
Production volume: 27403900928 tkm
Generated by: SimaPro
accessRestrictedTo: 0
copyright: false

## Geography
The inventory is modelled for South Africa

## Reference product
- transport, freight, light commercial vehicle {ZA}| transport, freight, light commercial vehicle, all, to generic market for transport, freight, light commercial vehicle | APOS, U [GLO]: 1 tkm
  Production Volume Amount: 27403900928

## Inputs from technosphere
- transport, freight, light commercial vehicle, EURO1 {ZA}| market for transport, freight, light commercial vehicle, EURO1 | APOS, U [GLO]: 0.02 tkm; lognormal SD95 1.0502
  (1,1,2,1,1,na)
  Calculated from the production volumes.
  The production volume is taken from the transport, freight, light commercial vehicle unregulated, EURO1 and EURO2 activities.
  It is estimated, that 50% of the production volume of this transport is transfered to the generic market for transport, freight,light commercial vehicle. Which means, that 50% of people using this transport do not know or do not care about the EURO class.
- transport, freight, light commercial vehicle, EURO2 {ZA}| market for transport, freight, light commercial vehicle, EURO2 | APOS, U [GLO]: 0.66 tkm; lognormal SD95 1.0502
  (same comment as for transport, freight, light commercial vehicle, EURO1 {ZA}| market for t)
- transport, freight, light commercial vehicle, unregulated {ZA}| market for transport, freight, light commercial vehicle, unregulated | APOS, U [GLO]: 0.32 tkm; lognormal SD95 1.0502
  (same comment as for transport, freight, light commercial vehicle, EURO1 {ZA}| market for t)

## Extrapolations
This dataset has been extrapolated from year 2019 to the year of the calculation (2021). The uncertainty has been adjusted accordingly.

## Sources
- Unknown, 2022, Ecoinvent 3, Unspecified
