# transport, freight, lorry with refrigeration machine, cooling {GLO}| market for | APOS, U

Dataset: EcoSpold 1, unit process
Functional unit: 1 tkm
Category: Road / Market
Geography: GLO
Production volume: 8146726400 tkm
Generated by: SimaPro
accessRestrictedTo: 0
copyright: false

## Geography
The inventory is modelled for Global

## Reference product
- transport, freight, lorry with refrigeration machine, cooling {GLO}| market for | APOS, U [GLO]: 1 tkm
  Production Volume Amount: 8146726400

## Inputs from technosphere
- transport, freight, lorry with refrigeration machine, cooling {GLO}| transport, freight, small lorry with refrigeration machine, EURO3, CO2 refrigerant, cooling to generic market | APOS, U [GLO]: 0.0504586 tkm
  Production Volume Amount: 411072288
- transport, freight, lorry with refrigeration machine, cooling {GLO}| transport, freight, small lorry with refrigeration machine, EURO3, R134a refrigerant, cooling to generic market | APOS, U [GLO]: 0.454127 tkm
  Production Volume Amount: 3699650816
- transport, freight, lorry with refrigeration machine, cooling {GLO}| transport, freight, small lorry with refrigeration machine, EURO4, CO2 refrigerant, cooling to generic market | APOS, U [GLO]: 0.0344039 tkm
  Production Volume Amount: 280278912
- transport, freight, lorry with refrigeration machine, cooling {GLO}| transport, freight, small lorry with refrigeration machine, EURO4, R134a refrigerant, cooling to generic market | APOS, U [GLO]: 0.309635 tkm
  Production Volume Amount: 2522510080
- transport, freight, lorry with refrigeration machine, cooling {GLO}| transport, freight, small lorry with refrigeration machine, EURO5, CO2 refrigerant, cooling to generic market | APOS, U [GLO]: 0.0116972 tkm
  Production Volume Amount: 95293800
- transport, freight, lorry with refrigeration machine, cooling {GLO}| transport, freight, small lorry with refrigeration machine, EURO5, R134a refrigerant, cooling to generic market | APOS, U [GLO]: 0.105275 tkm
  Production Volume Amount: 857644224
- transport, freight, lorry with refrigeration machine, cooling {GLO}| transport, freight, small lorry with refrigeration machine, EURO6, CO2 refrigerant, cooling to generic market | APOS, U [GLO]: 0.00344035 tkm
  Production Volume Amount: 28027620
- transport, freight, lorry with refrigeration machine, cooling {GLO}| transport, freight, small lorry with refrigeration machine, EURO6, R134a refrigerant, cooling to generic market | APOS, U [GLO]: 0.0309632 tkm
  Production Volume Amount: 252248576

## Extrapolations
This dataset has been extrapolated from year 2015 to the year of the calculation (2021). The uncertainty has been adjusted accordingly.

## Sources
- Unknown, 2022, Ecoinvent 3, Unspecified
