# transport, freight, lorry with refrigeration machine, freezing {GLO}| market for | APOS, U

Dataset: EcoSpold 1, unit process
Functional unit: 1 tkm
Category: Road / Market
Geography: GLO
Production volume: 6939803648 tkm
Generated by: SimaPro
accessRestrictedTo: 0
copyright: false

## Geography
The inventory is modelled for Global

## Reference product
- transport, freight, lorry with refrigeration machine, freezing {GLO}| market for | APOS, U [GLO]: 1 tkm
  Production Volume Amount: 6939803648

## Inputs from technosphere
- transport, freight, lorry with refrigeration machine, freezing {GLO}| transport, freight, small lorry with refrigeration machine, EURO3, CO2 refrigerant, freezing to generic market | APOS, U [GLO]: 0.0504586 tkm
  Production Volume Amount: 350172704
- transport, freight, lorry with refrigeration machine, freezing {GLO}| transport, freight, small lorry with refrigeration machine, EURO3, R134a refrigerant, freezing to generic market | APOS, U [GLO]: 0.454127 tkm
  Production Volume Amount: 3151554304
- transport, freight, lorry with refrigeration machine, freezing {GLO}| transport, freight, small lorry with refrigeration machine, EURO4, CO2 refrigerant, freezing to generic market | APOS, U [GLO]: 0.0344039 tkm
  Production Volume Amount: 238756096
- transport, freight, lorry with refrigeration machine, freezing {GLO}| transport, freight, small lorry with refrigeration machine, EURO4, R134a refrigerant, freezing to generic market | APOS, U [GLO]: 0.309635 tkm
  Production Volume Amount: 2148804864
- transport, freight, lorry with refrigeration machine, freezing {GLO}| transport, freight, small lorry with refrigeration machine, EURO5, CO2 refrigerant, freezing to generic market | APOS, U [GLO]: 0.0116972 tkm
  Production Volume Amount: 81176200
- transport, freight, lorry with refrigeration machine, freezing {GLO}| transport, freight, small lorry with refrigeration machine, EURO5, R134a refrigerant, freezing to generic market | APOS, U [GLO]: 0.105275 tkm
  Production Volume Amount: 730585792
- transport, freight, lorry with refrigeration machine, freezing {GLO}| transport, freight, small lorry with refrigeration machine, EURO6, CO2 refrigerant, freezing to generic market | APOS, U [GLO]: 0.00344035 tkm
  Production Volume Amount: 23875380
- transport, freight, lorry with refrigeration machine, freezing {GLO}| transport, freight, small lorry with refrigeration machine, EURO6, R134a refrigerant, freezing to generic market | APOS, U [GLO]: 0.0309632 tkm
  Production Volume Amount: 214878416

## Extrapolations
This dataset has been extrapolated from year 2015 to the year of the calculation (2021). The uncertainty has been adjusted accordingly.

## Sources
- Unknown, 2022, Ecoinvent 3, Unspecified
