# transport, freight, lorry, unspecified {BR}| market for transport, freight, lorry, unspecified | APOS, U

Dataset: EcoSpold 1, unit process
Functional unit: 1 tkm
Category: Road / Market
Geography: GLO
Production volume: 696147050496 tkm
Generated by: SimaPro
accessRestrictedTo: 0
copyright: false

## Geography
The inventory is modelled for Brazil

## Reference product
- transport, freight, lorry, unspecified {BR}| market for transport, freight, lorry, unspecified | APOS, U [GLO]: 1 tkm
  Production Volume Amount: 696147050496

## Inputs from technosphere
- transport, freight, lorry, unspecified {BR}| transport, freight, lorry, all sizes, EURO1 to generic market for transport, freight, lorry, unspecified | APOS, U [GLO]: 0.0400263 tkm
  Production Volume Amount: 27864225792
- transport, freight, lorry, unspecified {BR}| transport, freight, lorry, all sizes, EURO2 to generic market for transport, freight, lorry, unspecified | APOS, U [GLO]: 0.129432 tkm
  Production Volume Amount: 90103406592
- transport, freight, lorry, unspecified {BR}| transport, freight, lorry, all sizes, EURO3 to generic market for transport, freight, lorry, unspecified | APOS, U [GLO]: 0.390252 tkm
  Production Volume Amount: 271673098240
- transport, freight, lorry, unspecified {BR}| transport, freight, lorry, all sizes, EURO5 to generic market for transport, freight, lorry, unspecified | APOS, U [GLO]: 0.320208 tkm
  Production Volume Amount: 222912004096
- transport, freight, lorry, unspecified {BR}| transport, freight, lorry, all sizes, unregulated to generic market for transport, freight, lorry, unspecified | APOS, U [GLO]: 0.120081 tkm
  Production Volume Amount: 83594338304

## Extrapolations
This dataset has been extrapolated from year 2019 to the year of the calculation (2021). The uncertainty has been adjusted accordingly.

## Sources
- Unknown, 2022, Ecoinvent 3, Unspecified
