# transport, freight, lorry, unspecified {BR}| transport, freight, lorry, all sizes, unregulated to generic market for transport, freight, lorry, unspecified | APOS, U

Dataset: EcoSpold 1, unit process
Functional unit: 1 tkm
Category: Road / Market
Geography: GLO
Production volume: 83594338304 tkm
Generated by: SimaPro
accessRestrictedTo: 0
copyright: false

## Geography
The inventory is modelled for Brazil

## Reference product
- transport, freight, lorry, unspecified {BR}| transport, freight, lorry, all sizes, unregulated to generic market for transport, freight, lorry, unspecified | APOS, U [GLO]: 1 tkm
  Production Volume Amount: 83594338304

## Inputs from technosphere
- transport, freight, lorry >32 metric ton, unregulated {BR}| market for transport, freight, lorry >32 metric ton, unregulated | APOS, U [GLO]: 0.645 tkm; lognormal SD95 1.0502
  (1,1,2,1,1,na)
  Calculated from the production volumes.
  Production volume retrieved from the Brazilian National Logistic Plan -2025 (EPL, 2018), which reports the amount of 1,548 billion tonne.km of freight transported by lorries in 2015. The split among lorry size categories has been calculated according to fleet sizes, annual mileages and freight loads. The average annual mileage accounts for the annual mileage decay according to the fleet age of each size class (CETESB, 2019). Furthermore, the shares of emission regulation classes are estimated according to their respective fleet size reported for the state of São Paulo in 2018 (CETESB, 2019).
  References:
  CETESB (2019). Companhia Ambiental do Estado de São Paulo (2019). Emissões Veiculares no Estado de São Paulo. Governo do Estado de São Paulo. Available at: cetesb.sp.gov.br/veicular/relatoriose-publicacoes/. [Accessed on 15/06/2020]
  EPL (2018). Plano Nacional de Logística. PNL - 2025. Relatório Executivo. Available at: epl.gov.br/transporte-inter-regional-de-carga-no-brasil-panorama-2015 [Accessed on 24/05/2021]
- transport, freight, lorry 16-32 metric ton, unregulated {BR}| market for transport, freight, lorry 16-32 metric ton, unregulated | APOS, U [GLO]: 0.256 tkm; lognormal SD95 1.0502
  (1,1,2,1,1,na)
  Calculated from the production volumes.
  Production volume retrieved from the Brazilian National Logistic Plan -2025 (EPL, 2018), which reports the amount of 1,548 billion tonne.km of freight transported by lorries in 2015. The split among lorry size categories has been calculated according to fleet sizes, annual mileages and freight loads. The average annual mileage accounts for the annual mileage decay according to the fleet age of each size class (CETESB, 2019). Furthermore, the shares of emission regulation classes are estimated according to their respective fleet size reported for the state of São Paulo in 2018 (CETESB, 2019). It is estimated, that 10% of this transport is used for transport of goods in need of atmosphere control. And thus this production volume is included in the ""transport, freight, lorry ... with refrigeration machine"" datasets. It is also estimated, that 50% of the production volume of this transport is transfered to the generic market for transport, freight, lorry, unspecified. Which means, that 50% of people using this transport do not know or do not care about the size of the vehicle and the EURO class.
  References:
  CETESB (2019). Companhia Ambiental do Estado de São Paulo (2019). Emissões Veiculares no Estado de São Paulo. Governo do Estado de São Paulo. Available at: cetesb.sp.gov.br/veicular/relatoriose-publicacoes/. [Accessed on 15/06/2020]
  EPL (2018). Plano Nacional de Logística. PNL - 2025. Relatório Executivo. Available at: epl.gov.br/transporte-inter-regional-de-carga-no-brasil-panorama-2015 [Accessed on 24/05/2021]
- transport, freight, lorry 3.5-7.5 metric ton, unregulated {BR}| market for transport, freight, lorry 3.5-7.5 metric ton, unregulated | APOS, U [GLO]: 0.045 tkm; lognormal SD95 1.0502
  (1,1,2,1,1,na)
  Calculated from the production volumes.
  Production volume retrieved from the Brazilian National Logistic Plan -2025 (EPL, 2018), which reports the amount of 1,548 billion tonne.km of freight transported by lorries in 2015. The split among lorry size categories has been calculated according to fleet sizes, annual mileages and freight loads. The average annual mileage accounts for the annual mileage decay according to the fleet age of each size class (CETESB, 2019). Furthermore, the shares of emission regulation classes are estimated according to their respective fleet size reported for the state of São Paulo in 2018 (CETESB, 2019).
  References:
  CETESB (2019). Companhia Ambiental do Estado de São Paulo (2019). Emissões Veiculares no Estado de São Paulo. Governo do Estado de São Paulo. Available at: cetesb.sp.gov.br/veicular/relatoriose-publicacoes/. [Accessed on 15/06/2020]
  EPL (2018). Plano Nacional de Logística. PNL - 2025. Relatório Executivo. Available at: epl.gov.br/transporte-inter-regional-de-carga-no-brasil-panorama-2015 [Accessed on 24/05/2021].
- transport, freight, lorry 7.5-16 metric ton, unregulated {BR}| market for transport, freight, lorry 7.5-16 metric ton, unregulated | APOS, U [GLO]: 0.054 tkm; lognormal SD95 1.0502
  (same comment as for transport, freight, lorry >32 metric ton, unregulated {BR}| market for)

## Extrapolations
This dataset has been extrapolated from year 2019 to the year of the calculation (2021). The uncertainty has been adjusted accordingly.

## Sources
- Unknown, 2022, Ecoinvent 3, Unspecified
