# transport, freight, lorry, unspecified {GLO}| market group for transport, freight, lorry, unspecified | APOS, U

Dataset: EcoSpold 1, unit process
Functional unit: 1 tkm
Category: Road / Market
Geography: GLO
Production volume: 6691971137536 tkm
Generated by: SimaPro
accessRestrictedTo: 0
copyright: false

## Geography
The inventory is modelled for Global

## Reference product
- transport, freight, lorry, unspecified {GLO}| market group for transport, freight, lorry, unspecified | APOS, U [GLO]: 1 tkm
  Production Volume Amount: 6691971137536

## Inputs from technosphere
- transport, freight, lorry, unspecified {BR}| market for transport, freight, lorry, unspecified | APOS, U [GLO]: 0.104027 tkm
  Production Volume Amount: 696147050496
- transport, freight, lorry, unspecified {RER}| market for transport, freight, lorry, unspecified | APOS, U [GLO]: 0.0909956 tkm
  Production Volume Amount: 608939999232
- transport, freight, lorry, unspecified {RoW}| market for transport, freight, lorry, unspecified | APOS, U [GLO]: 0.78869 tkm
  Production Volume Amount: 5277893001216
- transport, freight, lorry, unspecified {ZA}| market for transport, freight, lorry, unspecified | APOS, U [GLO]: 0.0162868 tkm
  Production Volume Amount: 108990947328

## Extrapolations
This dataset has been extrapolated from year 2012 to the year of the calculation (2021). The uncertainty has been adjusted accordingly.

## Sources
- Unknown, 2022, Ecoinvent 3, Unspecified
