# transport, freight, lorry, unspecified {RER}| market for transport, freight, lorry, unspecified | APOS, U

Dataset: EcoSpold 1, unit process
Functional unit: 1 tkm
Category: Road / Market
Geography: GLO
Production volume: 608939999232 tkm
Generated by: SimaPro
accessRestrictedTo: 0
copyright: false

## Geography
The inventory is modelled for Europe

## Reference product
- transport, freight, lorry, unspecified {RER}| market for transport, freight, lorry, unspecified | APOS, U [GLO]: 1 tkm
  Production Volume Amount: 608939999232

## Inputs from technosphere
- transport, freight, lorry, unspecified {RER}| transport, freight, lorry, all sizes, EURO3 to generic market for | APOS, U [GLO]: 0.447088 tkm
  Production Volume Amount: 272249995264
- transport, freight, lorry, unspecified {RER}| transport, freight, lorry, all sizes, EURO4 to generic market for | APOS, U [GLO]: 0.390186 tkm
  Production Volume Amount: 237599997952
- transport, freight, lorry, unspecified {RER}| transport, freight, lorry, all sizes, EURO5 to generic market for | APOS, U [GLO]: 0.138339 tkm
  Production Volume Amount: 84239998976
- transport, freight, lorry, unspecified {RER}| transport, freight, lorry, all sizes, EURO6 to generic market for | APOS, U [GLO]: 0.0243866 tkm
  Production Volume Amount: 14849999872

## Extrapolations
This dataset has been extrapolated from year 2012 to the year of the calculation (2021). The uncertainty has been adjusted accordingly.

## Sources
- Unknown, 2022, Ecoinvent 3, Unspecified
