# transport, freight, lorry, unspecified {RoW}| market for transport, freight, lorry, unspecified | APOS, U

Dataset: EcoSpold 1, unit process
Functional unit: 1 tkm
Category: Road / Market
Geography: GLO
Production volume: 5277893001216 tkm
Generated by: SimaPro
accessRestrictedTo: 0
copyright: false

## Geography
The inventory is modelled for Rest-of-World

## Reference product
- transport, freight, lorry, unspecified {RoW}| market for transport, freight, lorry, unspecified | APOS, U [GLO]: 1 tkm
  Production Volume Amount: 5277893001216

## Inputs from technosphere
- transport, freight, lorry, unspecified {RoW}| transport, freight, lorry, all sizes, EURO3 to generic market for | APOS, U [GLO]: 0.40601 tkm
  Production Volume Amount: 2142878564352
- transport, freight, lorry, unspecified {RoW}| transport, freight, lorry, all sizes, EURO4 to generic market for | APOS, U [GLO]: 0.343263 tkm
  Production Volume Amount: 1811704709120
- transport, freight, lorry, unspecified {RoW}| transport, freight, lorry, all sizes, EURO5 to generic market for | APOS, U [GLO]: 0.229273 tkm
  Production Volume Amount: 1210078068736
- transport, freight, lorry, unspecified {RoW}| transport, freight, lorry, all sizes, EURO6 to generic market for | APOS, U [GLO]: 0.0214539 tkm
  Production Volume Amount: 113231544320

## Sources
- Unknown, 2022, Ecoinvent 3, Unspecified
