# transport, freight, lorry, unspecified {RoW}| transport, freight, lorry, all sizes, EURO3 to generic market for | APOS, U

Dataset: EcoSpold 1, unit process
Functional unit: 1 tkm
Category: Road / Market
Geography: GLO
Production volume: 2142878564352 tkm
Generated by: SimaPro
accessRestrictedTo: 0
copyright: false

## Geography
The inventory is modelled for Rest-of-World

## Reference product
- transport, freight, lorry, unspecified {RoW}| transport, freight, lorry, all sizes, EURO3 to generic market for | APOS, U [GLO]: 1 tkm
  Production Volume Amount: 2142878564352

## Inputs from technosphere
- transport, freight, lorry >32 metric ton, euro3 {RoW}| market for transport, freight, lorry >32 metric ton, EURO3 | APOS, U [GLO]: 0.6175 tkm; lognormal SD95 1.0502
  (1,1,3,1,1,na)
  Calculated from the production volumes.
  The production volume is taken from the ""transport, freight, lorry, ..., EURO3"" activities. There the production volumes for Europe are taken from the TREMOVE project and the GLO production volumes are calculated using GDP scaling. If the GDP of the whole world (GLO) is 1 the GDP of Europe (RER) is 0.289.
  It is estimated, that 10% of this transport is used for transport of goods in need of atmosphere control. And thus this production volume is included in the ""transport, freight, lorry ... with refrigeration machine"" datasets.
  It is also estimated, that 50% of the production volume of this transport is transfered to the generic market for transport, freight, lorry, unspecified. Which means, that 50% of people using this transport do not know or do not care about the size of the vehicle and the EURO class.
- transport, freight, lorry 16-32 metric ton, euro3 {RoW}| market for transport, freight, lorry 16-32 metric ton, EURO3 | APOS, U [GLO]: 0.2967 tkm; lognormal SD95 1.0502
  (same comment as for transport, freight, lorry >32 metric ton, euro3 {RoW}| market for tran)
- transport, freight, lorry 3.5-7.5 metric ton, euro3 {RoW}| market for transport, freight, lorry 3.5-7.5 metric ton, EURO3 | APOS, U [GLO]: 0.0391 tkm; lognormal SD95 1.0502
  (same comment as for transport, freight, lorry >32 metric ton, euro3 {RoW}| market for tran)
- transport, freight, lorry 7.5-16 metric ton, euro3 {RoW}| market for transport, freight, lorry 7.5-16 metric ton, EURO3 | APOS, U [GLO]: 0.0468 tkm; lognormal SD95 1.0502
  (same comment as for transport, freight, lorry >32 metric ton, euro3 {RoW}| market for tran)

## Sources
- Unknown, 2022, Ecoinvent 3, Unspecified
