# transport, freight, lorry, unspecified {RoW}| transport, freight, lorry, all sizes, EURO5 to generic market for | APOS, U

Dataset: EcoSpold 1, unit process
Functional unit: 1 tkm
Category: Road / Market
Geography: GLO
Production volume: 1210078068736 tkm
Generated by: SimaPro
accessRestrictedTo: 0
copyright: false

## Geography
The inventory is modelled for Rest-of-World

## Reference product
- transport, freight, lorry, unspecified {RoW}| transport, freight, lorry, all sizes, EURO5 to generic market for | APOS, U [GLO]: 1 tkm
  Production Volume Amount: 1210078068736

## Inputs from technosphere
- transport, freight, lorry >32 metric ton, euro5 {RoW}| market for transport, freight, lorry >32 metric ton, EURO5 | APOS, U [GLO]: 0.6439 tkm; lognormal SD95 1.0502
  (1,1,3,1,1,na)
  Calculated from the production volumes.
  The production volume is taken from the ""transport, freight, lorry, ..., EURO5"" activities. There the production volumes for Europe are taken from the TREMOVE project and for Brazil from Brazilian National Logistic Plan -2025. The GLO production volumes are calculated using tha global share of RER and BR based on OECD data that is 0.2024.
  It is estimated, that 10% of this transport is used for transport of goods in need of atmosphere control. And thus this production volume is included in the ""transport, freight, lorry ... with refrigeration machine"" datasets.
  It is also estimated, that 50% of the production volume of this transport is transfered to the generic market for transport, freight, lorry, unspecified. Which means, that 50% of people using this transport do not know or do not care about the size of the vehicle and the EURO class.
- transport, freight, lorry 16-32 metric ton, euro5 {RoW}| market for transport, freight, lorry 16-32 metric ton, EURO5 | APOS, U [GLO]: 0.2693 tkm; lognormal SD95 1.0502
  (same comment as for transport, freight, lorry >32 metric ton, euro5 {RoW}| market for tran)
- transport, freight, lorry 3.5-7.5 metric ton, euro5 {RoW}| market for transport, freight, lorry 3.5-7.5 metric ton, EURO5 | APOS, U [GLO]: 0.0389 tkm; lognormal SD95 1.0502
  (same comment as for transport, freight, lorry >32 metric ton, euro5 {RoW}| market for tran)
- transport, freight, lorry 7.5-16 metric ton, euro5 {RoW}| market for transport, freight, lorry 7.5-16 metric ton, EURO5 | APOS, U [GLO]: 0.0479 tkm; lognormal SD95 1.0502
  (same comment as for transport, freight, lorry >32 metric ton, euro5 {RoW}| market for tran)

## Sources
- Unknown, 2022, Ecoinvent 3, Unspecified
