# transport, freight, lorry, unspecified {ZA}| market for transport, freight, lorry, unspecified | APOS, U

Dataset: EcoSpold 1, unit process
Functional unit: 1 tkm
Category: Road / Market
Geography: GLO
Production volume: 108990947328 tkm
Generated by: SimaPro
accessRestrictedTo: 0
copyright: false

## Geography
The inventory is modelled for South Africa

## Reference product
- transport, freight, lorry, unspecified {ZA}| market for transport, freight, lorry, unspecified | APOS, U [GLO]: 1 tkm
  Production Volume Amount: 108990947328

## Inputs from technosphere
- transport, freight, lorry, unspecified {ZA}| transport, freight, lorry, all sizes, EURO1 to generic market for transport, freight, lorry, unspecified | APOS, U [GLO]: 0.13625 tkm
  Production Volume Amount: 14849999872
- transport, freight, lorry, unspecified {ZA}| transport, freight, lorry, all sizes, EURO2 to generic market for transport, freight, lorry, unspecified | APOS, U [GLO]: 0.590128 tkm
  Production Volume Amount: 64318599168
- transport, freight, lorry, unspecified {ZA}| transport, freight, lorry, all sizes, unregulated to generic market for transport, freight, lorry, unspecified | APOS, U [GLO]: 0.273622 tkm
  Production Volume Amount: 29822349312

## Extrapolations
This dataset has been extrapolated from year 2019 to the year of the calculation (2021). The uncertainty has been adjusted accordingly.

## Sources
- Unknown, 2022, Ecoinvent 3, Unspecified
