# transport, freight, lorry, unspecified {ZA}| transport, freight, lorry, all sizes, unregulated to generic market for transport, freight, lorry, unspecified | APOS, U

Dataset: EcoSpold 1, unit process
Functional unit: 1 tkm
Category: Road / Market
Geography: GLO
Production volume: 29822349312 tkm
Generated by: SimaPro
accessRestrictedTo: 0
copyright: false

## Geography
The inventory is modelled for South Africa

## Reference product
- transport, freight, lorry, unspecified {ZA}| transport, freight, lorry, all sizes, unregulated to generic market for transport, freight, lorry, unspecified | APOS, U [GLO]: 1 tkm
  Production Volume Amount: 29822349312

## Inputs from technosphere
- transport, freight, lorry >32 metric ton, unregulated {ZA}| market for transport, freight, lorry >32 metric ton, unregulated | APOS, U [GLO]: 0.7196 tkm; lognormal SD95 1.0502
  (1,1,2,1,1,na)
  Calculated from the production volumes.
  The production volume is taken from the ""transport, freight, lorry, ..., EURO3"" activities. There the production volumes for Europe are taken from the TREMOVE project and the GLO production volumes are calculated using GDP scaling. If the GDP of the whole world (GLO) is 1 the GDP of Europe (RER) is 0.289.
  It is estimated, that 10% of this transport is used for transport of goods in need of atmosphere control. And thus this production volume is included in the ""transport, freight, lorry ... with refrigeration machine"" datasets.
  It is also estimated, that 50% of the production volume of this transport is transfered to the generic market for transport, freight, lorry, unspecified. Which means, that 50% of people using this transport do not know or do not care about the size of the vehicle and the EURO class.
- transport, freight, lorry 16-32 metric ton, unregulated {ZA}| market for transport, freight, lorry 16-32 metric ton, unregulated | APOS, U [GLO]: 0.0571 tkm; lognormal SD95 1.0502
  (same comment as for transport, freight, lorry >32 metric ton, unregulated {ZA}| market for)
- transport, freight, lorry 3.5-7.5 metric ton, unregulated {ZA}| market for transport, freight, lorry 3.5-7.5 metric ton, unregulated | APOS, U [GLO]: 0.0804 tkm; lognormal SD95 1.0502
  (same comment as for transport, freight, lorry >32 metric ton, unregulated {ZA}| market for)
- transport, freight, lorry 7.5-16 metric ton, unregulated {ZA}| market for transport, freight, lorry 7.5-16 metric ton, unregulated | APOS, U [GLO]: 0.1429 tkm; lognormal SD95 1.0502
  (same comment as for transport, freight, lorry >32 metric ton, unregulated {ZA}| market for)

## Extrapolations
This dataset has been extrapolated from year 2019 to the year of the calculation (2021). The uncertainty has been adjusted accordingly.

## Sources
- Unknown, 2022, Ecoinvent 3, Unspecified
